<?xml version="1.0"?>
<!--
File:     O360-A4A.xml
Author:   Aero-Matic v 0.82

Inputs:
name:           O360-A4A
type:           piston
power:          180 hp
augmented?      no
injected?       no
-->

<piston_engine name="O360-A4A">
  <minmp unit="INHG">9.5</minmp>
  <maxmp unit="INHG">28.5</maxmp>
  <displacement unit="IN3">361</displacement>
  <maxhp>180.00</maxhp>
  <cylinders>4.0</cylinders>
  <maxrpm>2700.0</maxrpm>
  <idlerpm>500.0</idlerpm>
  <cycles>4.0</cycles>
  <!--<sparkfaildrop>0.8</sparkfaildrop>-->
  <!--<volumetric-efficiency>0.85</volumetric-efficiency>-->
  <compression-ratio>8.5</compression-ratio>
  <!--<bsfc>0.45</bsfc>-->
  <stroke unit="IN">4.375</stroke>
  <bore unit="IN">5.125</bore>
  <feed>2</feed>
</piston_engine>
