<?xml version="1.0"?>

<propeller name="prop">
  <ixx>2.43</ixx>
  <diameter unit="IN">76.0</diameter>
  <numblades>2</numblades>
  <gearratio>1.0</gearratio>
  <p_factor>-30.00</p_factor>

  <table name="C_THRUST" type="internal">
     <tableData>
       0.0   0.0518
       0.1   0.0497
       0.2   0.0475
       0.3   0.0437
       0.4   0.0392
       0.5   0.0346
       0.6   0.0280
       0.7   0.0212
       0.8   0.0115
       1.0  -0.0039
       1.2  -0.0204
       1.4  -0.0367
     </tableData>
  </table>


  <table name="C_POWER" type="internal">
     <tableData>
       0.0   0.0348
       0.1   0.0348
       0.2   0.0339
       0.3   0.0331
       0.4   0.0312
       0.5   0.0286
       0.6   0.0263
       0.7   0.0221
       0.8   0.0180
       1.0   0.0064
       1.2  -0.0103
       1.4  -0.0310
       1.6  -0.0525
     </tableData>
  </table>

  <!-- thrust effects of helical tip Mach -->
  <table name="CT_MACH" type="internal">
    <tableData>
      0.85 1.0
      1.05 0.8
    </tableData>
  </table>

  <!-- power-required effects of helical tip Mach -->
  <table name="CP_MACH" type="internal">
    <tableData>
      0.85 1.0
      1.05 1.8
      2.00 1.4
    </tableData>
  </table>

</propeller>
