<?xml version="1.0"?>

<!-- Uses AndersG's propeller values for now. -->

<propeller name="76em8">
  <ixx>1.7</ixx>
  <diameter unit="IN">76.0</diameter>
  <numblades>   2 </numblades>
  <minpitch>   22 </minpitch>
  <maxpitch>   22 </maxpitch>
  <p_factor>   10 </p_factor>
  <ct_factor> 0.8 </ct_factor>
  <cp_factor> 0.8 </cp_factor>

  <table name="C_THRUST" type="internal">
    <tableData>
      0.00000   0.08307
      0.05000   0.08379
      0.10000   0.08450
      0.15000   0.08441
      0.20000   0.08432
      0.25000   0.08371
      0.30000   0.08309
      0.35000   0.08155
      0.40000   0.08001
      0.45000   0.07694
      0.50000   0.07388
      0.55000   0.06789
      0.60000   0.06189
      0.65000   0.05453
      0.70000   0.04717
      0.75000   0.03946
      0.80000   0.03176
      0.85000   0.02383
      0.90000   0.01577
      0.95000   0.00757
      1.00000  -0.00079
      1.05000  -0.00929
      1.10000  -0.01782
      1.15000  -0.02635
      1.20000  -0.03487
      1.25000  -0.04340
      1.30000  -0.05193
      1.35000  -0.06046
      1.40000  -0.06898
      1.45000  -0.07751
      1.50000  -0.08604
      1.55000  -0.09457
      1.60000  -0.10309
      1.65000  -0.11162
      1.70000  -0.12015
      1.75000  -0.12868
      1.80000  -0.13720
      1.85000  -0.14573
      1.90000  -0.15426
      1.95000  -0.16279
      2.00000  -0.17131
    </tableData>
  </table>

  <table name="C_POWER" type="internal">
    <tableData>
      0.00000   0.05171
      0.05000   0.05268
      0.10000   0.05364
      0.15000   0.05255
      0.20000   0.05146
      0.25000   0.05117
      0.30000   0.05089
      0.35000   0.05103
      0.40000   0.05117
      0.45000   0.05128
      0.50000   0.05140
      0.55000   0.04972
      0.60000   0.04804
      0.65000   0.04461
      0.70000   0.04118
      0.75000   0.03647
      0.80000   0.03176
      0.85000   0.02602
      0.90000   0.01959
      0.95000   0.01240
      1.00000   0.00447
      1.05000  -0.00423
      1.10000  -0.01306
      1.15000  -0.02189
      1.20000  -0.03072
      1.25000  -0.03955
      1.30000  -0.04838
      1.35000  -0.05721
      1.40000  -0.06604
      1.45000  -0.07487
      1.50000  -0.08370
      1.55000  -0.09253
      1.60000  -0.10136
      1.65000  -0.11019
      1.70000  -0.11902
      1.75000  -0.12785
      1.80000  -0.13668
      1.85000  -0.14551
      1.90000  -0.15434
      1.95000  -0.16317
      2.00000  -0.17200
    </tableData>
  </table>

</propeller>
